<?xml version="1.0" encoding="UTF-8"?>
<?xml-stylesheet type="text/xsl" href="http://jsbsim.sourceforge.net/JSBSim.xsl"?>
<fdm_config name="Boeing-707" version="2.0" release="ALPHA"
    xmlns:xsi="http://www.w3.org/2001/XMLSchema-instance"
    xsi:noNamespaceSchemaLocation="http://jsbsim.sourceforge.net/JSBSim.xsd">

<fileheader>
    <author>Megaf - [mmegaf@gmail.com] [https://flightgear-republic.org]</author>
    <filecreationdate>07/03/2021</filecreationdate>
    <version>202103071800</version>
    <description>Boeing 707 for FlightGear</description>
</fileheader>

<metrics>
    <path>FDM/metrics.xml</path>
</metrics>

<mass_balance>
    <path>FDM/mass_balance.xml</path>
</mass_balance>

<ground_reactions>
    <path>FDM/ground_reactions.xml</path>
</ground_reactions>

</fdm_config>
